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/batch
! ANSYS input file written by Workbench version 2026 R1
! File used for geometry attach: C:\FSAE_Electronics\Electronics\PCBModal26\BoardStepfiles\Fault Latch 2.step
/title,FaultlatchWb--Modal (A5)
/com,--- Data in consistent MKS units. See Solving Units in the help system for more information.
/units,MKS
/prep7
! Turn off shape checking because checks already performed inside WB mesher.
! See help system for more information.
SHPP,OFF,,NOWARN
etcon,set             ! allow ANSYS to choose best KEYOP's for 180x elements, resets any applicable keyopt to MAPDL defaults
/com,*********** Send User Defined Coordinate System(s) ***********
csys,0
/com,*********** Nodes for the whole assembly ***********
nblock,3,,31135
(1i9,3e20.9e3)
        1     1.248314877E-01    -4.940152901E-02     7.550990000E-04
        2     9.324813782E-02    -7.036755556E-02     7.550990000E-04
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-1
/com,*********** Nodes for all Remote Points ***********
nblock,3
(1i9,3e20.9e3)
    28306     7.318950024E-02    -5.519249985E-02     1.510197997E-03
    28307     7.318950024E-02    -6.895380020E-02     1.510197997E-03
    28308     7.318950024E-02    -8.262450027E-02     1.510197997E-03
-1
/com,*********** Elements for Body 1 'Fault Latch 2_PCB|Solid' ***********
et,1,186
keyo,1,2,1          ! set full integration on SOLID186
MAT,1 $ TYPE,1 $ REAL,1 $ SECNUM,1 $ ESYS,0    ! ELEMNODES = 20
eblock,21,COMPACT,,4654
(21i9)
        1     1342     6742     6741     1466     2135     6751     6752     2011    13886    26890    14416    13883    16781    26912    16423    16422    13884    26894    26891    14414
        2     1342     1466     6741     6742     4818     4942     7120     7119    13883    14416    26890    13886    22965    23248    27525    22967    13885    14415    26892    26895
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-1
secnum,1    ! reset the section ID to default
toffst,273.15,      ! Temperature offset from absolute zero
/com,*********** Set Reference Temperature ***********
tref,22.
/com,*********** Send Materials ***********
MP,DENS,1,2250,	! kg m^-3
MP,EX,1,24000000000,	! Pa
MP,NUXY,1,0.13,

!************************* Model Summary ********************
! Fault Latch 2_PCB|Solid,	FR-4,	matid,	1
!************************* End Model Summary ********************
/com,*********** Fixed Supports ***********
CMBLOCK,_FIXEDSU,NODE,       45
(8i10)
      5379     -5394      6099     -6114      6611     -6626      6979     -7002
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cmsel,s,_FIXEDSU
d,all,all
nsel,all
/com,*********** Create Remote Point "Internal Remote Point" ***********
! -------- Remote Point Used by "Point Mass" --------
*set,tid,3
*set,cid,2
et,cid,177
et,tid,170
keyo,tid,2,1               ! Don't fix the pilot node
keyo,tid,4,000111
keyo,cid,12,5              ! Bonded Contact
keyo,cid,4,1               ! Deformable RBE3 style load
keyo,cid,2,2               ! MPC style contact
MAT,2 $ TYPE,2 $ REAL,2 $ SECNUM,2 $ ESYS,0    ! ELEMNODES = 3
eblock,21,COMPACT,,40
(21i9)
    11092     6634     6636    26681
    11093     6636     6635    26683
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-1
secnum,1    ! reset the section ID to default
*set,_npilot,28306
_npilot820=_npilot
type,tid
mat ,cid
real,cid
tshape,pilo
en,11132,_npilot
tshape
/com,*********** Create Remote Point "Internal Remote Point 2" ***********
! -------- Remote Point Used by "Point Mass 2" --------
*set,tid,5
*set,cid,4
et,cid,177
et,tid,170
keyo,tid,2,1               ! Don't fix the pilot node
keyo,tid,4,000111
keyo,cid,12,5              ! Bonded Contact
keyo,cid,4,1               ! Deformable RBE3 style load
keyo,cid,2,2               ! MPC style contact
MAT,4 $ TYPE,4 $ REAL,4 $ SECNUM,4 $ ESYS,0    ! ELEMNODES = 3
eblock,21,COMPACT,,40
(21i9)
    11133     6650     6652    26713
    11134     6652     6651    26715
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-1
secnum,1    ! reset the section ID to default
*set,_npilot,28307
_npilot823=_npilot
type,tid
mat ,cid
real,cid
tshape,pilo
en,11173,_npilot
tshape
/com,*********** Create Remote Point "Internal Remote Point 3" ***********
! -------- Remote Point Used by "Point Mass 3" --------
*set,tid,7
*set,cid,6
et,cid,177
et,tid,170
keyo,tid,2,1               ! Don't fix the pilot node
keyo,tid,4,000111
keyo,cid,12,5              ! Bonded Contact
keyo,cid,4,1               ! Deformable RBE3 style load
keyo,cid,2,2               ! MPC style contact
MAT,6 $ TYPE,6 $ REAL,6 $ SECNUM,6 $ ESYS,0    ! ELEMNODES = 3
eblock,21,COMPACT,,40
(21i9)
    11174     6490     6492    26393
    11175     6492     6491    26395
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-1
secnum,1    ! reset the section ID to default
*set,_npilot,28308
_npilot826=_npilot
type,tid
mat ,cid
real,cid
tshape,pilo
en,11214,_npilot
tshape
/com,*********** Construct Remote Mass Using Remote Attachment ***********
*set,_tid,8
et,_tid,21           ! MASS21 element
type,_tid
mat ,_tid
real,_tid
keyo,_tid,3,2        ! 3d mass without rotary inertia
r,_tid,1.2e-003
en,11215,28306
/com,*********** Construct Remote Mass Using Remote Attachment ***********
*set,_tid,9
et,_tid,21           ! MASS21 element
type,_tid
mat ,_tid
real,_tid
keyo,_tid,3,2        ! 3d mass without rotary inertia
r,_tid,1.2e-003
en,11216,28307
/com,*********** Construct Remote Mass Using Remote Attachment ***********
*set,_tid,10
et,_tid,21           ! MASS21 element
type,_tid
mat ,_tid
real,_tid
keyo,_tid,3,2        ! 3d mass without rotary inertia
r,_tid,1.2e-003
en,11217,28308
fini
/solu
antype,2                   ! modal analysis
_thickRatio=  0     ! Ratio of thick parts in the model
thexpand,off     ! ignore thermal strains
modopt,lanb,6
outres,erase
outres,all,none
outres,nsol,all
mxpand,,,,,,,       ! default expand in case of complex solution
dmpopt,esav,no
dmpopt,emat,no
dmpopt,full,no
! *********** WB SOLVE COMMAND ***********
! check interactive state
*get,ANSINTER_,active,,int
*if,ANSINTER_,ne,0,then
/eof
*endif
solve
/com *************** Write FE CONNECTORS *********
CEWRITE,file,ce,,INTE
*get,_nmodalsolproc,active,0,numcpu
fini
*get,_NSOLTHREADS,active,0,ntfs
*get,_NSOLPROCESSES,active,0,npfs
/post1
*dim,_direction,CHAR,6,1
_direction(1) = 'X'
_direction(2) = 'Y'
_direction(3) = 'Z'
_direction(4) = 'ROTX'
_direction(5) = 'ROTY'
_direction(6) = 'ROTZ'
*get,_lastLS,active,0,set,LSTP
*get,_beginset,active,0,set,nset,first,_lastLS
*get,_endset,active,0,set,nset,last,_lastLS
_nummodes = 0
*if,_endset,gt,0,then
_nummodes = _endset - _beginset + 1
*endif
*do,i_mode,1,_nummodes
   *do,j_component,1,6
			*get,PFACT_%i_mode%_%j_component%,MODE,%i_mode%,PFACT,,DIREC,_direction(%j_component%)
   *enddo
*enddo
*dim,_tmdirection,CHAR,6,1
_tmdirection(1) = 'X'
_tmdirection(2) = 'Y'
_tmdirection(3) = 'Z'
_tmdirection(4) = 'X'
_tmdirection(5) = 'Y'
_tmdirection(6) = 'Z'
*do,j_component,1,6
    *if,j_component,gt,3,then
        *get,TOTALMASS_%j_component%,ELEM,0,IOR,_tmdirection(%j_component%)
    *else
        *get,TOTALMASS_%j_component%,ELEM,0,MTOT,_tmdirection(%j_component%)
    *endif
*enddo
fini
